OpenVSP model (file version 5), 13 components.
Geometry view with OpenVSP parameter names; values to 6 digits, angles in degrees, lengths in the model's unit.
Overall bounding box: X_Min=0 X_Len=25 Y_Min=-15.35 Y_Len=30.7 Z_Min=-1.75 Z_Len=6.68195

Fuselage "Fuselage"
  location (X Y Z) 0 0 0, rotation 0 0 0
  bounding box size 25 3.5 4
  Design: Length=25
  cross sections:
    n  XLocPercent  YLocPercent  ZLocPercent  shape
    0  0            0            -0.01        point
    1  0.12         0            -0.01        circle Circle_Diameter=2.5
    2  0.25         0            0.01         general fuselage BotStr=0.83 BotTanAngle=90 CornerRad=0 Height=4 LowStr=1 MaxWidthLoc=0 TopStr=1.5 TopTanAngle=90 UpStr=1 Width=3.5
    3  0.5          0            0.01         as above
    4  0.7          0            0.008        ellipse Ellipse_Height=2 Ellipse_Width=1.5
    5  0.85         0            0.01         ellipse Ellipse_Height=1.2 Ellipse_Width=0.8
    6  1            0            0.02         point

Wing "Main_Wing", child of "Fuselage"
  location (X Y Z) 7 0 2.1, rotation 0 0 0
  symmetric about XZ
  bounding box size 5.22769 28.3628 0.283311
  totals: TotalSpan=28.2843 TotalProjectedSpan=28.2843 TotalChord=1.41421 TotalArea=40 TotalAR=20
  root: chord 2.32843, twist 0, NACA 4-series Camber=0.02 CamberLoc=0.4 Invert=1 ThickChord=0.12
  sections:
    n  Span     Root_Chord  Tip_Chord  Area  Sweep  Sweep_Location  Dihedral  Twist  Twist_Location  tip airfoil
    1  14.1421  2.32843     0.5        20    13     0.8             0         -2     0.25            NACA 4-series Camber=0 CamberLoc=0.2 ThickChord=0.1

Ellipsoid "Wing_Prop_Mount_1", child of "Main_Wing"
  location (X Y Z) 8.4 5 2.1, rotation 0 0 0; relative location 1.4 5 0, rotation 0 0 0
  symmetric about XZ
  bounding box size 2.7 10.5 0.5
  Design: A_Radius=1.35 B_Radius=0.25 C_Radius=0.25

Propeller "Wing_Prop_1", child of "Main_Wing"
  location (X Y Z) 11.1 5 2.1, rotation 0 0 0; relative location 4.1 5 0, rotation 0 0 0
  symmetric about XZ
  bounding box size 0 12.5 2.5
  Design: Diameter=2.5 NumBlade=3 Beta34=20 UseBeta34Flag=1 Feather=0 Rotate=0 Precone=0 ReverseFlag=0 FoldAngle=0 PropMode=2 AF=151.538 CLi=0.538798 Chord=0.177656 Solidity=0.169649 ConstructXoC=0.5 FeatherAxisXoC=0.5 FeatherOffsetXoC=0
  cross sections:
    n  RadiusFrac  shape
    0  0.2         ellipse Ellipse_Height=0.05 Ellipse_Width=0.1
    1  0.4         NACA 16-series Chord=0.207813 IdealCl=0.7 ThickChord=0.144074
    2  1           NACA 16-series Chord=0.1625 IdealCl=0.2 ThickChord=0.03
  Chord along r/R (cubic Bezier): 0.2: 0.08, 0.333333: 0.15, 0.466667: 0.2, 0.6: 0.2, 0.716667: 0.2, 0.833333: 0.2, 0.95: 0.2, 0.966667: 0.2, 0.983333: 0.2, 1: 0.13
  Twist along r/R (PCHIP): 0.2: 46.75, 0.75: 20, 1: 13
  Thick along r/R (cubic Bezier): 0.2: 0.5, 0.233333: 0.3, 0.266667: 0.225, 0.3: 0.2, 0.4: 0.125, 0.5: 0.115, 0.6: 0.1, 0.733333: 0.075, 0.866667: 0.055, 1: 0.03
  CLI along r/R (cubic Bezier): 0.2: 0, 0.266667: 0.7, 0.333333: 0.7, 0.4: 0.7, 0.466667: 0.7, 0.533333: 0.7, 0.6: 0.7, 0.733333: 0.7, 0.866667: 0.7, 1: 0.2

Ellipsoid "Wing_Prop_Mount_2", child of "Main_Wing"
  location (X Y Z) 9.8 9.55 2.1, rotation 0 0 0; relative location 2.8 9.55 0, rotation 0 0 0
  symmetric about XZ
  bounding box size 2.2 19.6 0.5
  Design: A_Radius=1.1 B_Radius=0.25 C_Radius=0.25

Propeller "Wing_Prop_2", child of "Main_Wing"
  location (X Y Z) 12 9.55 2.1, rotation 0 0 0; relative location 5 9.55 0, rotation 0 0 0
  symmetric about XZ
  bounding box size 0 21.6 2.5
  Design: Diameter=2.5 NumBlade=3 Beta34=20 UseBeta34Flag=1 Feather=0 Rotate=0 Precone=0 ReverseFlag=0 FoldAngle=0 PropMode=2 AF=151.538 CLi=0.538798 Chord=0.177656 Solidity=0.169649 ConstructXoC=0.5 FeatherAxisXoC=0.5 FeatherOffsetXoC=0
  cross sections:
    n  RadiusFrac  shape
    0  0.2         ellipse Ellipse_Height=0.05 Ellipse_Width=0.1
    1  0.4         NACA 16-series Chord=0.207813 IdealCl=0.7 ThickChord=0.144074
    2  1           NACA 16-series Chord=0.1625 IdealCl=0.2 ThickChord=0.03
  blade curves as in "Wing_Prop_1"

Ellipsoid "Wing_Prop_Mount_3", child of "Main_Wing"
  location (X Y Z) 11.1 14.1 2.1, rotation 0 0 0; relative location 4.1 14.1 0, rotation 0 0 0
  symmetric about XZ
  bounding box size 1.6 28.7 0.5
  Design: A_Radius=0.8 B_Radius=0.25 C_Radius=0.25

Propeller "Wing_Prop_3", child of "Main_Wing"
  location (X Y Z) 12.7 14.1 2.1, rotation 0 0 0; relative location 5.7 14.1 0, rotation 0 0 0
  symmetric about XZ
  bounding box size 0 30.7 2.5
  Design: Diameter=2.5 NumBlade=3 Beta34=20 UseBeta34Flag=1 Feather=0 Rotate=0 Precone=0 ReverseFlag=0 FoldAngle=0 PropMode=2 AF=151.538 CLi=0.538798 Chord=0.177656 Solidity=0.169649 ConstructXoC=0.5 FeatherAxisXoC=0.5 FeatherOffsetXoC=0
  cross sections:
    n  RadiusFrac  shape
    0  0.2         ellipse Ellipse_Height=0.05 Ellipse_Width=0.1
    1  0.4         NACA 16-series Chord=0.207813 IdealCl=0.7 ThickChord=0.144074
    2  1           NACA 16-series Chord=0.1625 IdealCl=0.2 ThickChord=0.03
  blade curves as in "Wing_Prop_1"

Wing "Canard", child of "Fuselage"
  location (X Y Z) 0.2 0 -0.25, rotation 0 0 0
  symmetric about XZ
  bounding box size 2.29192 20.7459 0.187332
  totals: TotalSpan=20.4939 TotalProjectedSpan=20.4939 TotalChord=1.46385 TotalArea=30 TotalAR=14
  root: chord 1.39531, twist 0, NACA 4-series Camber=0.02 CamberLoc=0.4 ThickChord=0.12
  sections:
    n  Span    Root_Chord  Tip_Chord  Area  Sweep  Sweep_Location  Dihedral  Twist  Twist_Location  tip airfoil
    1  10.247  1.39531     1.53239    15    5      1               0         0      0.25            NACA 4-series Camber=0 CamberLoc=0.2 ThickChord=0.1

Ellipsoid "Canard_Prop_Mount", child of "Canard"
  location (X Y Z) 0.95 10.25 -0.25, rotation 0 0 0; relative location 0.75 10.25 0, rotation 0 0 0
  symmetric about XZ
  bounding box size 2 21 0.5
  Design: A_Radius=1 B_Radius=0.25 C_Radius=0.25

Propeller "Canard_Prop", child of "Canard"
  location (X Y Z) 2.95 10.25 -0.25, rotation 0 0 0; relative location 2.75 10.25 0, rotation 0 0 0
  symmetric about XZ
  bounding box size 0 23 2.5
  Design: Diameter=2.5 NumBlade=3 Beta34=20 UseBeta34Flag=1 Feather=0 Rotate=0 Precone=0 ReverseFlag=0 FoldAngle=0 PropMode=2 AF=151.538 CLi=0.538798 Chord=0.177656 Solidity=0.169649 ConstructXoC=0.5 FeatherAxisXoC=0.5 FeatherOffsetXoC=0
  cross sections:
    n  RadiusFrac  shape
    0  0.2         ellipse Ellipse_Height=0.05 Ellipse_Width=0.1
    1  0.4         NACA 16-series Chord=0.207813 IdealCl=0.7 ThickChord=0.144074
    2  1           NACA 16-series Chord=0.1625 IdealCl=0.2 ThickChord=0.03
  blade curves as in "Wing_Prop_1"

Wing "Horizontal_Tail", child of "Fuselage"
  location (X Y Z) 22.5 0 0.4, rotation 0 0 0
  symmetric about XZ
  bounding box size 1.5 11.7773 0.150087
  totals: TotalSpan=11.6 TotalProjectedSpan=11.6 TotalChord=1.28889 TotalArea=14.9511 TotalAR=9
  root: chord 1.5, twist 0, NACA 4-series Camber=0 CamberLoc=0.2 ThickChord=0.1
  sections:
    n  Span  Root_Chord  Tip_Chord  Area     Sweep  Sweep_Location  Dihedral  Twist  Twist_Location  tip airfoil
    1  5.8   1.5         1.07778    7.47556  0      0.5             0         0      0.25            as above

Wing "Vertical_Tail", child of "Fuselage"
  location (X Y Z) 22.5 0 0.4, rotation 90 0 0
  bounding box size 1.5 0.150087 4.53195
  totals: TotalSpan=4.47214 TotalProjectedSpan=4.47214 TotalChord=1.11803 TotalArea=5 TotalAR=4
  root: chord 1.5, twist 0, NACA 4-series Camber=0 CamberLoc=0.2 ThickChord=0.1
  sections:
    n  Span     Root_Chord  Tip_Chord  Area  Sweep  Sweep_Location  Dihedral  Twist  Twist_Location  tip airfoil
    1  4.47214  1.5         0.736068   5     0      1               0         0      0.25            as above
