OpenVSP model (file version 5), 9 components.
Geometry view with OpenVSP parameter names; values to 6 digits, angles in degrees, lengths in the model's unit.
Overall bounding box: X_Min=0 X_Len=9 Y_Min=-6.45558 Y_Len=12.9112 Z_Min=-1.4 Z_Len=3.65233

Fuselage "Fuselage"
  location (X Y Z) 0 0 0, rotation 0 0 0
  bounding box size 9 1.3 1.45809
  Design: Length=9
  cross sections:
    n  XLocPercent  YLocPercent  ZLocPercent  shape
    0  0            0            -0.01        point
    1  0.133333     0            -0.015       circle Circle_Diameter=0.8
    2  0.248888     0            0            general fuselage BotStr=0.83 BotTanAngle=90 CornerRad=0 Height=1.4 LowStr=1 MaxWidthLoc=0 TopStr=1.5 TopTanAngle=90 UpStr=1 Width=1
    3  0.35         0            0            general fuselage BotStr=0.83 BotTanAngle=90 CornerRad=0 Height=1.4 LowStr=1 MaxWidthLoc=0 TopStr=1.5 TopTanAngle=90 UpStr=1 Width=1.3
    4  0.6          0            0            general fuselage BotStr=0.83 BotTanAngle=90 CornerRad=0 Height=1 LowStr=1 MaxWidthLoc=0 TopStr=0.83 TopTanAngle=90 UpStr=1 Width=0.8
    5  0.85         0            0.00833333   general fuselage BotStr=0.83 BotTanAngle=90 CornerRad=0 Height=0.4 LowStr=1 MaxWidthLoc=0 TopStr=1.5 TopTanAngle=90 UpStr=1 Width=0.3
    6  1            0            0.0166667    point

Wing "Main_Wing", child of "Fuselage"
  location (X Y Z) 3 0 0.59, rotation 0 0 0
  symmetric about XZ
  bounding box size 1.56961 12.9112 0.199652
  totals: TotalSpan=12.6491 TotalProjectedSpan=12.6491 TotalChord=1.26491 TotalArea=16 TotalAR=10
  root: chord 1.40546, twist 0, airfoil file "NASA/LANGLEY NLF 0414F AIRFOIL"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 BaseThickChord=0.141833 ThickChord=0.141833
  sections:
    n  Span     Root_Chord  Tip_Chord  Area  Sweep  Sweep_Location  Dihedral  Twist  Twist_Location  tip airfoil
    1  6.32456  1.40546     1.12437    8     2      0.8             0         -2     0.25            as above

Wing "Canard", child of "Fuselage"
  location (X Y Z) 0.2 0 -0.15, rotation 0 0 0
  symmetric about XZ
  bounding box size 0.325 2.63902 0.0390176
  totals: TotalSpan=2.6 TotalProjectedSpan=2.6 TotalChord=0.325 TotalArea=0.845 TotalAR=8
  root: chord 0.325, twist 0, NACA 4-series Camber=0 CamberLoc=0.2 ThickChord=0.12
  sections:
    n  Span  Root_Chord  Tip_Chord  Area    Sweep  Sweep_Location  Dihedral  Twist  Twist_Location  tip airfoil
    1  1.3   0.325       0.325      0.4225  0      1               0         0      0.25            as above

Wing "Horizontal_Tail", child of "Fuselage"
  location (X Y Z) 7.75 0 0.15, rotation 0 0 0
  symmetric about XZ
  bounding box size 1.08993 3.76701 0.109056
  totals: TotalSpan=3.67852 TotalProjectedSpan=3.67852 TotalChord=0.817448 TotalArea=3.007 TotalAR=4.50001
  root: chord 1.08993, twist 0, NACA 4-series Camber=0 CamberLoc=0.2 ThickChord=0.1
  sections:
    n  Span     Root_Chord  Tip_Chord  Area    Sweep  Sweep_Location  Dihedral  Twist  Twist_Location  tip airfoil
    1  1.83926  1.08993     0.544965   1.5035  0      0.5             0         0      0.25            as above

Wing "Vertical_Tail", child of "Fuselage"
  location (X Y Z) 7.75 0 0.15, rotation 90 0 0
  bounding box size 1.13247 0.113313 2.10233
  totals: TotalSpan=2.04751 TotalProjectedSpan=2.04751 TotalChord=0.905978 TotalArea=1.855 TotalAR=2.26
  root: chord 1.13247, twist 0, NACA 4-series Camber=0 CamberLoc=0.2 ThickChord=0.1
  sections:
    n  Span     Root_Chord  Tip_Chord  Area   Sweep  Sweep_Location  Dihedral  Twist  Twist_Location  tip airfoil
    1  2.04751  1.13247     0.679484   1.855  0      1               0         0      0.25            as above

Wing "Front_LG", child of "Fuselage"
  location (X Y Z) 2 0 -0.65, rotation -90 0 0
  bounding box size 0.17296 0.1 0.58
  totals: TotalSpan=0.58 TotalProjectedSpan=0.58 TotalChord=0.07069 TotalArea=0.0410002 TotalAR=8.20484
  root: chord 0.07069, twist 0, ellipse Ellipse_Height=0.1 Ellipse_Width=0.07069
  sections:
    n  Span  Root_Chord  Tip_Chord  Area       Sweep  Sweep_Location  Dihedral  Twist  Twist_Location  tip airfoil
    1  0.58  0.07069     0.07069    0.0410002  -10    0               0         0      0.25            as above

Wing "Rear_LG", child of "Front_LG"
  location (X Y Z) 4.5 0.25 -0.55, rotation -45 0 0; relative location 2.5 -0.1 0.25, rotation 45 0 0
  symmetric about XY
  bounding box size 0.047 1.57708 0.604271
  totals: TotalSpan=1.6 TotalProjectedSpan=1.54568 TotalChord=0.047 TotalArea=0.0752 TotalAR=31.7702
  root: chord 0.047, twist 0, circle Circle_Diameter=0.047
  sections:
    n  Span  Root_Chord  Tip_Chord  Area    Sweep  Sweep_Location  Dihedral  Twist  Twist_Location  tip airfoil
    1  0.2   0.047       0.047      0.0094  0      0               20        0      0.25            as above
    2  0.2   0.047       0.047      0.0094  0      0               0         0      0.25            as above
    3  0.2   0.047       0.047      0.0094  0      0               -10       0      0.25            as above
    4  0.2   0.047       0.047      0.0094  0      0               -20       0      0.25            as above

Wing "Front_LG_Wheel", child of "Front_LG"
  location (X Y Z) 1.78 0 -1.25, rotation 0 0 0; relative location -0.22 0.6 0, rotation 90 0 0
  symmetric about XY
  bounding box size 0.3 0.14 0.3
  totals: TotalSpan=0.14 TotalProjectedSpan=0.14 TotalChord=0.3 TotalArea=0.042 TotalAR=0.466667
  root: chord 0.3, twist 0, circle Circle_Diameter=0.3
  sections:
    n  Span  Root_Chord  Tip_Chord  Area   Sweep  Sweep_Location  Dihedral  Twist  Twist_Location  tip airfoil
    1  0.07  0.3         0.3        0.021  0      0               0         0      0.25            as above

Wing "Rear_LG_Wheel", child of "Front_LG"
  location (X Y Z) 4.35 0.75 -1.1, rotation 0 0 0; relative location 2.35 0.45 0.75, rotation 90 0 0
  symmetric about XY
  bounding box size 0.34 1.74 0.34
  totals: TotalSpan=0.24 TotalProjectedSpan=0.24 TotalChord=0.34 TotalArea=0.0816 TotalAR=0.705882
  root: chord 0.34, twist 0, circle Circle_Diameter=0.34
  sections:
    n  Span  Root_Chord  Tip_Chord  Area    Sweep  Sweep_Location  Dihedral  Twist  Twist_Location  tip airfoil
    1  0.12  0.34        0.34       0.0408  0      0               0         0      0.25            as above
